f(x) := e^x
a := 0
b := 2
n := 1200
i := 0 .. n
h := (b - a)/n
x[i] := a + i*h
x =  # no stored result
S := integral(f(x), x = a .. b)
T := h*sum((f(x[i - 1]) + f(x[i]))/2, i = 1 .. n)
T = 6.38906
|S - T| = 1.47895e-6
S = 6.38906
g(x) := e^(x^3)
T1 := h*sum((g(x[i - 1]) + g(x[i]))/2, i = 1 .. n)
A1 := integral(g(x), x = 0 .. 2)
A1 = 276.853
T1 = 276.861
