simp(f, a, b, n) :=
    h ← (b - a)/n
    s ← 0
    x ← a + h
    y ← a + 2*h
    for i ∈ 1 .. n/2
        s ← s + 4*f(x)
        x ← x + 2*h
    for i ∈ 1 .. (n - 2)/2
        s ← s + 2*f(y)
        y ← y + 2*h
    s ← h/3*(f(a) + f(b) + s)
    s
g(x) := e^x
simp(g, 0, 2, 10) = 6.38911
f(x) := e^(x^2)
simp(f, 0, 2, 30) = 16.4531
integral(e^x, x = 0 .. 2) = 6.38906
integral(e^(x^2), x = 0 .. 2) = 16.4526
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