n := 0 .. 4
i := 1 .. 3
r := 0.5
h := 1
a := 1
E := 0.5
u[0, n] := 0
u[1, 0] := 0
u[2, 0] := 1
u[3, 0] := 0
u[4, n] := 0
u[i, n + 1] := u[i, n] + r*E*(u[i + 1, n] - (2*u[i, n] - u[i - 1, n]))/h^2 - r*a*(u[i + 1, n] - u[i - 1, n])/(2*h)
u[i, n + 1] = [0; 0.5; 0.5; 0; 0.25; 0.5; 0; 0.125; 0.375; 0; 0.0625; 0.25; 0; 0.03125; 0.15625]
